x0 := 1
y0 := 1
x1 := 1.5
y1 := 1.4055
x2 := 2
y2 := 1.6931
q := 0
x3 := 2.5
y3 := 1.9163
ss := q*(q - 1)*(q - 2)*(q - 3)*(q - 4) = 0
x4 := 3
y4 := 2.0986
L4 := y0*ss/(4!*q) - y1*ss/(3!*(q - 1)) + y2*ss/(2!*2!*(q - 2)) - y3*ss/(3!*(q - 3)) + y4*ss/(4!*(q - 4)) = 0
h := 0.5
L4f0 := 1/h*(y0/4!*(4*q^3 - 30*q^2 + 70*q - 50) - y1/3!*(4*q^3 - 27*q^2 + 52*q - 24) + y2/(2!*2!)*(4*q^3 - 24*q^2 + 38*q - 12) - y3/3!*(4*q^3 - 21*q^2 + 28*q - 8) + y4/4!*(4*q^3 - 18*q^2 + 22*q - 6)) = 0.979567
n := 4
q := 1
X := x2
L4f1 := 1/h*(y0/4!*(4*q^3 - 30*q^2 + 70*q - 50) - y1/3!*(4*q^3 - 27*q^2 + 52*q - 24) + y2/(2!*2!)*(4*q^3 - 24*q^2 + 38*q - 12) - y3/3!*(4*q^3 - 21*q^2 + 28*q - 8) + y4/4!*(4*q^3 - 18*q^2 + 22*q - 6)) = 0.670267
q := 2
L4f2 := 1/h*(y0/4!*(4*q^3 - 30*q^2 + 70*q - 50) - y1/3!*(4*q^3 - 27*q^2 + 52*q - 24) + y2/(2!*2!)*(4*q^3 - 24*q^2 + 38*q - 12) - y3/3!*(4*q^3 - 21*q^2 + 28*q - 8) + y4/4!*(4*q^3 - 18*q^2 + 22*q - 6)) = 0.497967
q := 3
L4f3 := 1/h*(y0/4!*(4*q^3 - 30*q^2 + 70*q - 50) - y1/3!*(4*q^3 - 27*q^2 + 52*q - 24) + y2/(2!*2!)*(4*q^3 - 24*q^2 + 38*q - 12) - y3/3!*(4*q^3 - 21*q^2 + 28*q - 8) + y4/4!*(4*q^3 - 18*q^2 + 22*q - 6)) = 0.402667
q := 4
L4f4 := 1/h*(y0/4!*(4*q^3 - 30*q^2 + 70*q - 50) - y1/3!*(4*q^3 - 27*q^2 + 52*q - 24) + y2/(2!*2!)*(4*q^3 - 24*q^2 + 38*q - 12) - y3/3!*(4*q^3 - 21*q^2 + 28*q - 8) + y4/4!*(4*q^3 - 18*q^2 + 22*q - 6)) = 0.324367
q1 := 0
ss1 := q1*(q1 - 1)*(q1 - 2) = 0
L2 := y0*ss1/(2!*q1) - y2*ss1/(1!*1!*(q1 - 1)) + y4*ss1/(2!*(q1 - 2)) = 0
L2f0 := 1/h*(y0/2!*(2*q1 - 3) - y1/1!*(2*q1 - 2) + y2/2!*(2*q1 - 1)) = 0.9289
q1 := 1
L2f1 := 1/h*(y0/2!*(2*q1 - 3) - y1/1!*(2*q1 - 2) + y2/2!*(2*q1 - 1)) = 0.6931
q1 := 2
L2f2 := 1/h*(y0/2!*(2*q1 - 3) - y1/1!*(2*q1 - 2) + y2/2!*(2*q1 - 1)) = 0.4573
q1 := 0
L2f3 := 1/h*(y2/2!*(2*q1 - 3) - y3/1!*(2*q1 - 2) + y4/2!*(2*q1 - 1)) = 0.4873
q1 := 1
L2f4 := 1/h*(y2/2!*(2*q1 - 3) - y3/1!*(2*q1 - 2) + y4/2!*(2*q1 - 1)) = 0.4055
q1 := 2
# Расчет дла n=4
L2f5 := 1/h*(y2/2!*(2*q1 - 3) - y3/1!*(2*q1 - 2) + y4/2!*(2*q1 - 1)) = 0.3237
L4f0 = 0.979567
L4f1 = 0.670267
L4f2 = 0.497967
L4f3 = 0.402667
L4f4 = 0.324367
# Расчет дла n=2
L2f0 = 0.9289
L2f1 = 0.6931
L2f2 = 0.4573
L2f3 = 0.4873
L2f4 = 0.4055
L2f5 = 0.3237
# Точное значение заданой функции
f(x) := 1 + ln(x)
f(X) = 1.69315
# Значение производной
d/dX(1 + ln(X)) = 0.5
r := d/dX(1 + ln(X)) - L2f2 = 0.0427
r*2 = 0.0854
r1 := d/dX(1 + ln(X)) - L4f2 = 0.00203333
r1*2 = 0.00406667
