x[0] := -3
x[1] := -2
x[2] := -1
x[3] := 0
x[4] := 1
x[5] := 2
x[6] := 3
n := 7
y[0] := 2.6
y[1] := -0.3
y[2] := -2
y[3] := -2.3
y[4] := -1.5
y[5] := 0.7
y[6] := 3.2
A1 := x[0] + x[1] + x[2] + x[3] + x[4] + x[5] + x[6] = 0
B1 := y[0] + y[1] + y[2] + y[3] + y[4] + y[5] + y[6] = 0.4
j := 6
C1 := x[0]^2 + x[1]^2 + x[2]^2 + x[3]^2 + x[4]^2 + x[5]^2 + x[6]^2 = 28
x[j]^3 = 27
x[j]^2 = 9
D1 := x[0]*y[0] + x[1]*y[1] + x[2]*y[2] + x[3]*y[3] + x[4]*y[4] + x[5]*y[5] + x[6]*y[6] = 4.3
x[j]*y[j] = 9.6
E1 := x[0]^3 + x[1]^3 + x[2]^3 + x[3]^3 + x[4]^3 + x[5]^3 + x[6]^3 = 0
x[j]^4 = 81
F1 := x[0]^4 + x[1]^4 + x[2]^4 + x[3]^4 + x[4]^4 + x[5]^4 + x[6]^4 = 196
x[j]^2*y[j] = 28.8
G1 := x[0]^2*y[0] + x[1]^2*y[1] + x[2]^2*y[2] + x[3]^2*y[3] + x[4]^2*y[4] + x[5]^2*y[5] + x[6]^2*y[6] = 50.3
a0 := det([n, A1, C1; A1, C1, E1; C1, E1, F1])
a := det([B1, A1, C1; D1, C1, E1; G1, E1, F1])/a0
b := det([n, B1, C1; A1, D1, E1; C1, G1, F1])/a0
c1 := det([n, A1, B1; A1, C1, D1; C1, E1, G1])/a0
a = -2.2619
b = 0.153571
a1 := det([n, A1; A1, C1]) = 196
c1 = 0.579762
b1 := det([B1, A1; D1, C1])/a1 = 0.0571429
c2 := det([n, B1; A1, D1])/a1 = 0.153571
b1 = 0.0571429
c2 = 0.153571
f(x) := c1*x^2 + b*x + a
f1(x) := c2*x + b1
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d1[0] := y[0] - f(x[0]) = 0.104762
d[0] := y[0] - f1(x[0]) = 3.00357
d1[1] := y[1] - f(x[1]) = -0.05
d[1] := y[1] - f1(x[1]) = -0.05
d1[2] := y[2] - f(x[2]) = -0.164286
d[2] := y[2] - f1(x[2]) = -1.90357
d1[3] := y[3] - f(x[3]) = -0.0380952
d[3] := y[3] - f1(x[3]) = -2.35714
d1[4] := y[4] - f(x[4]) = 0.0285714
d[4] := y[4] - f1(x[4]) = -1.71071
d1[5] := y[5] - f(x[5]) = 0.335714
d[5] := y[5] - f1(x[5]) = 0.335714
d1[6] := y[6] - f(x[6]) = -0.216667
d[6] := y[6] - f1(x[6]) = 2.68214
d1^2 = [0.0109751; 0.0025; 0.0269898; 0.00145125; 0.000816327; 0.112704; 0.0469444]
d^2 = [9.02144; 0.0025; 3.62358; 5.55612; 2.92654; 0.112704; 7.19389]
S1 := d[0]^2 + d[1]^2 + d[2]^2 + d[3]^2 + d[4]^2 + d[5]^2 + d[6]^2 = 28.4368
S2 := d1[0]^2 + d1[1]^2 + d1[2]^2 + d1[3]^2 + d1[4]^2 + d1[5]^2 + d1[6]^2 = 0.202381
