x0 := 1
x1 := 1.5
x2 := 2
x3 := 2.5
x4 := 3
x5 := 3.5
eps := 1.74
y0 := 1
y1 := 1.4055
y2 := 1.6931
y3 := 1.9163
y4 := 2.0986
y5 := 2.2528
n := 6
M := [0, 4, 1, 0, 0, 0, 0; 0, 1, 4, 1, 0, 0, 0; 0, 0, 1, 4, 1, 0, 0; 0, 0, 0, 1, 4, 1, 0]
# Сплайн
f(x) := 1 + ln(x)
deltay[0] := y1 - y0 = 0.4055
h := x1 - x0 = 0.5
deltay[1] := y2 - y1 = 0.2876
delta2y[0] := deltay[1] - deltay[0] = -0.1179
deltay[2] := y3 - y2 = 0.2232
delta2y[1] := deltay[2] - deltay[1] = -0.0644
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deltay[3] := y4 - y3 = 0.1823
delta2y[2] := deltay[3] - deltay[2] = -0.0409
deltay[4] := y5 - y4 = 0.1542
delta2y[3] := deltay[4] - deltay[3] = -0.0281
B := [3*delta2y[0]/h^2; 3*delta2y[1]/h^2; 3*delta2y[2]/h^2; 3*delta2y[3]/h^2] = [-1.4148; -0.7728; -0.4908; -0.3372]
C := lsolve(M, B)
b[1] := deltay[0]/h - 1/3*h*(C[1] + 2*C[0]) = 0.866242
a[1] := y0
d[1] := (C[1] - C[0])/3h = -0.110483
d[2] := (C[2] - C[1])/3h = 0.0808161
b[2] := deltay[1]/h - 1/3*h*(C[2] + 2*C[1]) = 0.700517
a[2] := y1
d[3] := (C[3] - C[2])/3h = 0.00121876
b[3] := deltay[2]/h - 1/3*h*(C[3] + 2*C[2]) = 0.490291
a[3] := y2
M = [0, 4, 1, 0, 0, 0, 0; 0, 1, 4, 1, 0, 0, 0; 0, 0, 1, 4, 1, 0, 0; 0, 0, 0, 1, 4, 1, 0]
d[4] := (C[4] - C[3])/3h = 0.00830885
b[4] := deltay[3]/h - 1/3*h*(C[4] + 2*C[3]) = 0.403118
a[4] := y3
d[5] := (C[6] - C[5])/3h = 0.00339365
b[5] := deltay[4]/h - 1/3*h*(C[5] + 2*C[4]) = 0.330236
a[5] := y4
d = [0; -0.110483; 0.0808161; 0.00121876; 0.00830885; 0.00339365]
b = [0; 0.866242; 0.700517; 0.490291; 0.403118; 0.330236]
a = [0; 1; 1.4055; 1.6931; 1.9163; 2.0986]
C = [0; -0.33145; -0.0890013; -0.085345; -0.0604185; -0.0101809; 0]
B = [-1.4148; -0.7728; -0.4908; -0.3372]
f1(x) := d[1]*(x - x0)^3 + C[1]*(x - x0)^2 + b[1]*(x - x0) + a[1]
f2(x) := d[2]*(x - x1)^3 + C[2]*(x - x1)^2 + b[2]*(x - x1) + a[2]
f3(x) := d[3]*(x - x2)^3 + C[3]*(x - x2)^2 + b[3]*(x - x2) + a[3]
f4(x) := d[4]*(x - x3)^3 + C[4]*(x - x3)^2 + b[4]*(x - x3) + a[4]
f5(x) := d[5]*(x - x4)^3 + C[5]*(x - x4)^2 + b[5]*(x - x4) + a[5]
f3(eps) = 1.55983
2*(f3(eps) - f(eps)) = 0.0118968
# Эйлер
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f6(x) := d^7/dx^7(1 + ln(x)) → 720/x^7
L1(x) := y0*(x - x1)*(x - x2)*(x - x3)*(x - x4)*(x - x5)/((x0 - x1)*(x0 - x2)*(x0 - x3)*(x0 - x4)*(x0 - x5))
L2(x) := y1*(x - x0)*(x - x2)*(x - x3)*(x - x4)*(x - x5)/((x1 - x0)*(x1 - x2)*(x1 - x3)*(x1 - x4)*(x1 - x5))
L3(x) := y2*(x - x0)*(x - x1)*(x - x3)*(x - x4)*(x - x5)/((x2 - x0)*(x2 - x1)*(x2 - x3)*(x2 - x4)*(x2 - x5))
L4(x) := y3*(x - x0)*(x - x1)*(x - x2)*(x - x4)*(x - x5)/((x3 - x0)*(x3 - x1)*(x3 - x2)*(x3 - x4)*(x3 - x5))
L5(x) := y4*(x - x0)*(x - x1)*(x - x2)*(x - x3)*(x - x5)/((x4 - x0)*(x4 - x1)*(x4 - x2)*(x4 - x3)*(x4 - x5))
L6(x) := y5*(x - x0)*(x - x1)*(x - x2)*(x - x3)*(x - x4)/((x5 - x0)*(x5 - x1)*(x5 - x2)*(x5 - x3)*(x5 - x4))
L(x) := L1(x) + L2(x) + L3(x) + L4(x) + L5(x) + L6(x)
RR(x) := f6(eps)*(x - x0)*(x - x1)*(x - x2)*(x - x3)*(x - x4)*(x - x5)/(n + 1)! → (x - 2.5)*(x - 1.5)*(x - 3.5)*(x - 2)*(x - 3)*(14.9103472676*x - 14.9103472676)/5040
RRR(x) := f6(x5)*|(x - x0)*(x - x1)*(x - x2)*(x - x3)*(x - x4)*(x - x5)|/(n + 1)! → 2.22037152714e-5*|(x - 2.5)*(x - 1.5)*(x - 3.5)*(x - 1)*(x - 2)*(x - 3)|
L(eps) = 1.55404
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RR(eps) = 0.000230234
1*(L(eps) - f(eps)) = 0.000153468
RRR(eps) = 1.72798e-6
A1 := [x0^2, x0, 1; x1^2, x1, 1; x2^2, x2, 1]
B1 := [y0; y1; y2]
A2 := [x1^2, x1, 1; x2^2, x2, 1; x3^2, x3, 1]
B2 := [y1; y2; y3]
m1 := lsolve(A1, B1) = [-0.2358; 1.4005; -0.1647]
m2 := lsolve(A2, B2) = [-0.1288; 1.026; 0.1563]
A3 := [x2^2, x2, 1; x3^2, x3, 1; x4^2, x4, 1]
B3 := [y2; y3; y4]
A4 := [x3^2, x4, 1; x4^2, x4, 1; x5^2, x5, 1]
B4 := [y3; y4; y5]
m3 := lsolve(A3, B3) = [-0.0818; 0.8145; 0.3913]
m4 := lsolve(A4, B4) = [0.0662909; -0.122491; 1.86945]
# Кусочно - квадратичная | Кусочно - линейлая
LC1(x) := m1[0]*x^2 + m1[1]*x + m1[2]
LL1(x) := (x - x0)*(y1 - y0)/(x1 - x0) + y0
LC2(x) := m2[0]*x^2 + m2[1]*x + m2[2]
LL2(x) := (x - x1)*(y2 - y1)/(x2 - x1) + y1
LC3(x) := m3[0]*x^2 + m3[1]*x + m3[2]
LL3(x) := (x - x3)*(y3 - y2)/(x3 - x2) + y2
LC4(x) := m4[0]*x^2 + m4[1]*x + m4[2]
LL4(x) := (x - x3)*(y4 - y3)/(x4 - x3) + y3
LC2(eps) = 1.55159
LL5(x) := (x - x4)*(y5 - y4)/(x5 - x4) + y4
LL2(eps) = 1.54355
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2*(LC2(eps) - f(eps)) = -0.00459999
2*(LL2(eps) - f(eps)) = -0.0206742
