f1(x) := 0.5*x + 5
f2(x) := (x - 2)^3 - 2
f3(x) := 3/x
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F12(x) := f1(x) - f2(x)
x121 := 4
x122 := 5
X121 := root(F12(x121), x121) = 4.08329
0.5*x + 5 - 3/x == 0
X122 := root(F12(x122), x122) = 4.08329
[-10.5677643628; 0.56776436283]
F13(x) := f1(x) - f3(x)
x131 := 0.1
x132 := 2
X131 := root(F13(x131), x131) = 0.567764
0.5*z + 5 - ((z - 2)^3 - 2) == 0
X132 := root(F13(x132), x132) = -10.5678
F23(x) := f2(x) - f3(x)
[4.083287113; 0.958356443499 + 1.65983851516i; 0.958356443499 - 1.65983851516i]
x231 := -1
x232 := 3
X231 := root(F23(x231), x231) = -0.229358
X232 := root(F23(x232), x232) = 3.4222
a := X132
b := X231
3/y - ((y - 2)^3 - 2) == 0
c := X131
d := X232
S1 := integral(f1(x), x = a .. b) - integral(f3(x), x = a .. b) = 35.2766
S2 := integral(f1(x), x = b .. c) - integral(f2(x), x = b .. c) = 10.7707
S3 := integral(f3(x), x = c .. d) - integral(f2(x), x = c .. d) = 11.127
ploshad := S1 + S2 + S3 = 57.1743
[
    3/2 - sqrt(24*sqrt((4*sqrt(41) - 12)^(1/3) + (800 - 96*sqrt(41))^(1/3) - 8) - 4*sqrt(9*sqrt(41) - 27) + 6*(4*sqrt(41) - 12)^(1/3)*sqrt((4*sqrt(41) - 12)^(1/3) + (800 - 96*sqrt(41))^(1/3) - 8) - 3*(800 - 96*sqrt(41))^(1/3)*sqrt((4*sqrt(41) - 12)^(1/3) + (800 - 96*sqrt(41))^(1/3) - 8))/(2*(4*sqrt(41) - 12)^(1/6)*(9*(4*sqrt(41) - 12)^(1/3) + 9*(800 - 96*sqrt(41))^(1/3) - 72)^(1/4)) - sqrt((4*sqrt(41) - 12)^(1/3) + (800 - 96*sqrt(41))^(1/3) - 8)/(2*(4*sqrt(41) - 12)^(1/6));
    sqrt(24*sqrt((4*sqrt(41) - 12)^(1/3) + (800 - 96*sqrt(41))^(1/3) - 8) - 4*sqrt(9*sqrt(41) - 27) + 6*(4*sqrt(41) - 12)^(1/3)*sqrt((4*sqrt(41) - 12)^(1/3) + (800 - 96*sqrt(41))^(1/3) - 8) - 3*(800 - 96*sqrt(41))^(1/3)*sqrt((4*sqrt(41) - 12)^(1/3) + (800 - 96*sqrt(41))^(1/3) - 8))/(2*(4*sqrt(41) - 12)^(1/6)*(9*(4*sqrt(41) - 12)^(1/3) + 9*(800 - 96*sqrt(41))^(1/3) - 72)^(1/4)) - sqrt((4*sqrt(41) - 12)^(1/3) + (800 - 96*sqrt(41))^(1/3) - 8)/(2*(4*sqrt(41) - 12)^(1/6)) + 3/2;
    sqrt((4*sqrt(41) - 12)^(1/3) + (800 - 96*sqrt(41))^(1/3) - 8)/(2*(4*sqrt(41) - 12)^(1/6)) - sqrt(24*sqrt((4*sqrt(41) - 12)^(1/3) + (800 - 96*sqrt(41))^(1/3) - 8) + 4*sqrt(9*sqrt(41) - 27) + 6*(4*sqrt(41) - 12)^(1/3)*sqrt((4*sqrt(41) - 12)^(1/3) + (800 - 96*sqrt(41))^(1/3) - 8) - 3*(800 - 96*sqrt(41))^(1/3)*sqrt((4*sqrt(41) - 12)^(1/3) + (800 - 96*sqrt(41))^(1/3) - 8))/(2*(4*sqrt(41) - 12)^(1/6)*(9*(4*sqrt(41) - 12)^(1/3) + 9*(800 - 96*sqrt(41))^(1/3) - 72)^(1/4)) + 3/2;
    sqrt((4*sqrt(41) - 12)^(1/3) + (800 - 96*sqrt(41))^(1/3) - 8)/(2*(4*sqrt(41) - 12)^(1/6)) + sqrt(24*sqrt((4*sqrt(41) - 12)^(1/3) + (800 - 96*sqrt(41))^(1/3) - 8) + 4*sqrt(9*sqrt(41) - 27) + 6*(4*sqrt(41) - 12)^(1/3)*sqrt((4*sqrt(41) - 12)^(1/3) + (800 - 96*sqrt(41))^(1/3) - 8) - 3*(800 - 96*sqrt(41))^(1/3)*sqrt((4*sqrt(41) - 12)^(1/3) + (800 - 96*sqrt(41))^(1/3) - 8))/(2*(4*sqrt(41) - 12)^(1/6)*(9*(4*sqrt(41) - 12)^(1/3) + 9*(800 - 96*sqrt(41))^(1/3) - 72)^(1/4)) + 3/2
] = [1.40358 - 1.36091i; 1.40358 + 1.36091i; -0.229358; 3.4222]
