a := 0.2
b := 0.8
matr := [
    8.3, 2.62 + a, 4.1, 1.9;
    3.92, 8.45, 7.78 - a, 2.46;
    3.77, 7.21 + a, 8.04, 2.28;
    2.12, 3.65 - a, 1.69, 6.69
]
res := [-10.65 + b; 12.21; 15.45 - b; -8.35]
det := |matr|
det1 := matr
det2 := matr
det3 := matr
det4 := matr
det1[0, 0] := res[0]
det2[0, 1] := res[0]
det3[0, 2] := res[0]
det4[0, 3] := res[0]
lsolve(matr, res) = [-2.60157; -0.183852; 3.55976; -1.22816]
det1[1, 0] := res[1]
det2[1, 1] := res[1]
det3[1, 2] := res[1]
det4[1, 3] := res[1]
det1[2, 0] := res[2]
det2[2, 1] := res[2]
det3[2, 2] := res[2]
det4[2, 3] := res[2]
det1[3, 0] := res[3]
det2[3, 1] := res[3]
det3[3, 2] := res[3]
det4[3, 3] := res[3]
det = 442.993
x1 := |det1|/det = -2.60157
x2 := |det2|/det = -0.183852
x3 := |det3|/det = 3.55976
x4 := |det4|/det = -1.22816
m[1] := matr[1, 0]/matr[0, 0] = 0.472289
m[2] := matr[2, 0]/matr[0, 0] = 0.454217
m[3] := matr[3, 0]/matr[0, 0] = 0.255422  # Метод исключения Гауса
m = [0; 0.472289; 0.454217; 0.255422]
matr1 := [
    matr[0, 0], matr[0, 1], matr[0, 2], matr[0, 3];
    matr[1, 0] - m[1]*matr[0, 0], matr[1, 1] - m[1]*matr[0, 1], matr[1, 2] - m[1]*matr[0, 2], matr[1, 3] - m[1]*matr[0, 3];
    matr[2, 0] - m[2]*matr[0, 0], matr[2, 1] - m[2]*matr[0, 1], matr[2, 2] - m[2]*matr[0, 2], matr[2, 3] - m[2]*matr[0, 3];
    matr[3, 0] - m[3]*matr[0, 0], matr[3, 1] - m[3]*matr[0, 1], matr[3, 2] - m[3]*matr[0, 2], matr[3, 3] - m[3]*matr[0, 3]
] = [
    8.3, 2.82, 4.1, 1.9;
    0, 7.11814, 5.64361, 1.56265;
    0, 6.12911, 6.17771, 1.41699;
    0, 2.72971, 0.642771, 6.2047
]
res1 := [res[0]; res[1] - m[1]*res[0]; res[2] - m[2]*res[0]; res[3] - m[3]*res[0]]
res1 = [-9.85; 16.862; 19.124; -5.8341]
m[2] := matr1[2, 1]/matr1[1, 1] = 0.861054
m[3] := matr1[3, 1]/matr1[1, 1] = 0.383486
m = [0; 0.472289; 0.861054; 0.383486]
res2 := [res[0]; res[1] - m[1]*res[0]; res1[2] - m[2]*res1[1]; res1[3] - m[3]*res1[1]]
res2 = [-9.85; 16.862; 4.6049; -12.3005]
matr2 := [
    matr[0, 0], matr[0, 1], matr[0, 2], matr[0, 3];
    matr[1, 0] - m[1]*matr[0, 0], matr[1, 1] - m[1]*matr[0, 1], matr[1, 2] - m[1]*matr[0, 2], matr[1, 3] - m[1]*matr[0, 3];
    matr1[2, 0] - m[2]*matr1[1, 0], matr1[2, 1] - m[2]*matr1[1, 1], matr1[2, 2] - m[2]*matr1[1, 2], matr1[2, 3] - m[2]*matr1[1, 3];
    matr1[3, 0] - m[3]*matr1[1, 0], matr1[3, 1] - m[3]*matr1[1, 1], matr1[3, 2] - m[3]*matr1[1, 2], matr1[3, 3] - m[3]*matr1[1, 3]
] = [
    8.3, 2.82, 4.1, 1.9;
    0, 7.11814, 5.64361, 1.56265;
    0, 0, 1.31825, 0.0714611;
    0, 0, -1.52148, 5.60544
]
m[3] := matr2[3, 2]/matr2[2, 2] = -1.15416
m = [0; 0.472289; 0.861054; -1.15416]
matr3 := [
    matr[0, 0], matr[0, 1], matr[0, 2], matr[0, 3];
    matr[1, 0] - m[1]*matr[0, 0], matr[1, 1] - m[1]*matr[0, 1], matr[1, 2] - m[1]*matr[0, 2], matr[1, 3] - m[1]*matr[0, 3];
    matr1[2, 0] - m[2]*matr1[1, 0], matr1[2, 1] - m[2]*matr1[1, 1], matr1[2, 2] - m[2]*matr1[1, 2], matr1[2, 3] - m[2]*matr1[1, 3];
    matr2[3, 0] - m[3]*matr2[2, 0], matr2[3, 1] - m[3]*matr2[2, 1], matr2[3, 2] - m[3]*matr2[2, 2], matr2[3, 3] - m[3]*matr2[2, 3]
] = [8.3, 2.82, 4.1, 1.9; 0, 7.11814, 5.64361, 1.56265; 0, 0, 1.31825, 0.0714611; 0, 0, 0, 5.68792]
res3 := [res[0]; res[1] - m[1]*res[0]; res1[2] - m[2]*res1[1]; res2[3] - m[3]*res2[2]]
res3 = [-9.85; 16.862; 4.6049; -6.98566]
x[3] := res3[3]/matr3[3, 3] = -1.22816
x[2] := (res3[2] - matr3[2, 3]*x[3])/matr3[2, 2] = 3.55976
x[1] := (res3[1] - matr3[1, 3]*x[3] - matr3[1, 2]*x[2])/matr3[1, 1] = -0.183852
x[0] := (res3[0] - matr3[0, 3]*x[3] - matr3[0, 2]*x[2] - matr3[0, 1]*x[1])/matr3[0, 0] = -2.60157
C[0, 0] := 1
C[1, 1] := 1
C[2, 2] := 1
C[3, 3] := 1  # Схема Холецкого
B[0, 0] := matr[0, 0]
B[1, 0] := matr[1, 0]
B[2, 0] := matr[2, 0]
B[3, 0] := matr[3, 0]
C[0, 1] := matr[0, 1]/B[0, 0]
C[0, 2] := matr[0, 2]/B[0, 0]
C[0, 3] := matr[0, 3]/B[0, 0]
B[1, 1] := matr[1, 1] - B[1, 0]*C[0, 1]
B[2, 1] := matr[2, 1] - B[2, 0]*C[0, 1]
B[3, 1] := matr[3, 1] - B[3, 0]*C[0, 1]
C[1, 2] := (matr[1, 2] - B[1, 0]*C[0, 2])/B[1, 1]
C[1, 3] := (matr[1, 3] - B[1, 0]*C[0, 3])/B[1, 1]
B[2, 2] := matr[2, 2] - B[2, 0]*C[0, 2] - B[2, 1]*C[1, 2]
B[3, 2] := matr[3, 2] - B[3, 0]*C[0, 2] - B[3, 1]*C[1, 2]
C[2, 3] := (matr[2, 3] - B[2, 0]*C[0, 3] - B[2, 1]*C[1, 3])/B[2, 2]
B[3, 3] := matr[3, 3] - B[3, 0]*C[0, 3] - B[3, 1]*C[1, 3] - B[3, 2]*C[2, 3]
B = [8.3, 0, 0, 0; 3.92, 7.11814, 0, 0; 3.77, 6.12911, 1.31825, 0; 2.12, 2.72971, -1.52148, 5.68792]
C = [1, 0.339759, 0.493976, 0.228916; 0, 1, 0.792849, 0.219531; 0, 0, 1, 0.0542089; 0, 0, 0, 1]
B*C = [8.3, 2.82, 4.1, 1.9; 3.92, 8.45, 7.58, 2.46; 3.77, 7.41, 8.04, 2.28; 2.12, 3.45, 1.69, 6.69]
matr = [8.3, 2.82, 4.1, 1.9; 3.92, 8.45, 7.58, 2.46; 3.77, 7.41, 8.04, 2.28; 2.12, 3.45, 1.69, 6.69]
y1[0] := res[0]/B[0, 0]
y1[1] := (res[1] - B[1, 0]*y1[0])/B[1, 1]
y1[2] := (res[2] - B[2, 0]*y1[0] - B[2, 1]*y1[1])/B[2, 2] = 3.49318
y1[3] := (res[3] - B[3, 0]*y1[0] - B[3, 1]*y1[1] - B[3, 2]*y1[2])/B[3, 3]
x1[3] := y1[3] = -1.22816
x1[2] := y1[2] - C[2, 3]*x1[3] = 3.55976
y1 = [-1.18675; 2.36888; 3.49318; -1.22816]
x1[1] := y1[1] - C[1, 2]*x1[2] - C[1, 3]*x1[3] = -0.183852
x1[0] := y1[0] - C[0, 1]*x1[1] - C[0, 2]*x1[2] - C[0, 3]*x1[3] = -2.60157
x1 = [-2.60157; -0.183852; 3.55976; -1.22816]
x = [-2.60157; -0.183852; 3.55976; -1.22816]
m1[1] := matr[1, 0]/matr[0, 0]
m1[2] := matr[2, 0]/matr[0, 0]
m1[3] := matr[3, 0]/matr[0, 0]  # Жордана - Гауса
m1 = [0; 0.472289; 0.454217; 0.255422]
Matr1 := [
    matr[0, 0], matr[0, 1], matr[0, 2], matr[0, 3];
    matr[1, 0] - m1[1]*matr[0, 0], matr[1, 1] - m1[1]*matr[0, 1], matr[1, 2] - m1[1]*matr[0, 2], matr[1, 3] - m1[1]*matr[0, 3];
    matr[2, 0] - m1[2]*matr[0, 0], matr[2, 1] - m1[2]*matr[0, 1], matr[2, 2] - m1[2]*matr[0, 2], matr[2, 3] - m1[2]*matr[0, 3];
    matr[3, 0] - m1[3]*matr[0, 0], matr[3, 1] - m1[3]*matr[0, 1], matr[3, 2] - m1[3]*matr[0, 2], matr[3, 3] - m1[3]*matr[0, 3]
] = [
    8.3, 2.82, 4.1, 1.9;
    0, 7.11814, 5.64361, 1.56265;
    0, 6.12911, 6.17771, 1.41699;
    0, 2.72971, 0.642771, 6.2047
]
Res1 := [res[0]; res[1] - m1[1]*res[0]; res[2] - m1[2]*res[0]; res[3] - m1[3]*res[0]] = [-9.85; 16.862; 19.124; -5.8341]
m1[0] := Matr1[0, 1]/Matr1[1, 1]
m1[2] := Matr1[2, 1]/Matr1[1, 1]
m1[3] := Matr1[3, 1]/Matr1[1, 1]
m1 = [0.396171; 0.472289; 0.861054; 0.383486]
Matr2 := [
    Matr1[0, 0] - Matr1[1, 0]*m1[0], Matr1[0, 1] - Matr1[1, 1]*m1[0], Matr1[0, 2] - Matr1[1, 2]*m1[0], Matr1[0, 3] - Matr1[1, 3]*m1[0];
    Matr1[1, 0], Matr1[1, 1], Matr1[1, 2], Matr1[1, 3];
    Matr1[2, 0] - Matr1[1, 0]*m1[2], Matr1[2, 1] - Matr1[1, 1]*m1[2], Matr1[2, 2] - Matr1[1, 2]*m1[2], Matr1[2, 3] - Matr1[1, 3]*m1[2];
    Matr1[3, 0] - Matr1[1, 0]*m1[3], Matr1[3, 1] - Matr1[1, 1]*m1[3], Matr1[3, 2] - Matr1[1, 2]*m1[3], Matr1[3, 3] - Matr1[1, 3]*m1[3]
] = [
    8.3, 0, 1.86417, 1.28092;
    0, 7.11814, 5.64361, 1.56265;
    0, 0, 1.31825, 0.0714611;
    0, 0, -1.52148, 5.60544
]
Res2 := [Res1[0] - m1[0]*Res1[1]; Res1[1]; Res1[2] - m1[2]*Res1[1]; Res1[3] - m1[3]*Res1[1]] = [-16.5302; 16.862; 4.6049; -12.3005]
m1[0] := Matr2[0, 2]/Matr2[2, 2]
m1[1] := Matr2[1, 2]/Matr2[2, 2]
m1[3] := Matr2[3, 2]/Matr2[2, 2]
m1 = [1.41412; 4.28113; 0.861054; -1.15416]
m = [0; 0.472289; 0.861054; -1.15416]
Matr3 := [
    Matr2[0, 0] - Matr2[2, 0]*m1[0], Matr2[0, 1] - Matr2[2, 1]*m1[0], Matr2[0, 2] - Matr2[2, 2]*m1[0], Matr2[0, 3] - Matr2[2, 3]*m1[0];
    Matr2[1, 0] - Matr2[2, 0]*m1[1], Matr2[1, 1] - Matr2[2, 1]*m1[1], Matr2[1, 2] - Matr2[2, 2]*m1[1], Matr2[1, 3] - Matr2[2, 3]*m1[1];
    Matr2[2, 0], Matr2[2, 1], Matr2[2, 2], Matr2[2, 3];
    Matr2[3, 0] - Matr2[2, 0]*m1[3], Matr2[3, 1] - Matr2[2, 1]*m1[3], Matr2[3, 2] - Matr2[2, 2]*m1[3], Matr2[3, 3] - Matr2[2, 3]*m1[3]
] = [8.3, 0, 0, 1.17987; 0, 7.11814, 0, 1.25672; 0, 0, 1.31825, 0.0714611; 0, 0, 0, 5.68792]
Res3 := [Res2[0] - m1[0]*Res2[2]; Res2[1] - m1[1]*Res2[2]; Res2[2]; Res2[3] - m1[3]*Res2[2]] = [-23.0421; -2.85213; 4.6049; -6.98566]
m1[0] := Matr3[0, 3]/Matr3[3, 3]
m1[1] := Matr3[1, 3]/Matr3[3, 3]
m1[2] := Matr3[2, 3]/Matr3[3, 3]
m1 = [0.207434; 0.220945; 0.0125637; -1.15416]
Matr4 := [
    Matr3[0, 0] - Matr2[3, 0]*m1[0], Matr3[0, 1] - Matr3[3, 1]*m1[0], Matr3[0, 2] - Matr3[3, 2]*m1[0], Matr3[0, 3] - Matr3[3, 3]*m1[0];
    Matr3[1, 0] - Matr3[3, 0]*m1[1], Matr3[1, 1] - Matr3[3, 1]*m1[1], Matr3[1, 2] - Matr3[3, 2]*m1[1], Matr3[1, 3] - Matr3[3, 3]*m1[1];
    Matr3[2, 0] - Matr3[3, 0]*m1[2], Matr3[2, 1] - Matr3[3, 1]*m1[2], Matr3[2, 2] - Matr3[3, 2]*m1[2], Matr3[2, 3] - Matr3[3, 3]*m1[2];
    Matr3[3, 0], Matr3[3, 1], Matr3[3, 2], Matr3[3, 3]
] = [8.3, 0, 0, 0; 0, 7.11814, 0, 0; 0, 0, 1.31825, 0; 0, 0, 0, 5.68792]
Res4 := [Res3[0] - m1[0]*Res3[3]; Res3[1] - m1[1]*Res3[3]; Res3[2] - m1[2]*Res3[3]; Res3[3]] = [-21.5931; -1.30869; 4.69266; -6.98566]
x2[0] := Res4[0]/Matr4[0, 0]
x2[1] := Res4[1]/Matr4[1, 1]
x2[2] := Res4[2]/Matr4[2, 2]
x2[3] := Res4[3]/Matr4[3, 3]
x2 = [-2.60157; -0.183852; 3.55976; -1.22816]
x = [-2.60157; -0.183852; 3.55976; -1.22816]
# Метод Зейделя
M := [7, 0.09, -0.03; 0.09, 4, -0.15; 0.04, -0.08, 6]
b := [6.5; 8.5; 15.5]
ee := 0.0001
a := b[0]/M[0, 0]
a1 := b[1]/M[1, 1]
a2 := b[2]/M[2, 2]
e := 0
e1 := 0
e2 := 0
[
    0, -M[0, 1]/M[0, 0], -M[0, 2]/M[0, 0];
    -M[1, 0]/M[1, 1], 0, -M[1, 2]/M[1, 1];
    -M[2, 0]/M[2, 2], -M[2, 1]/M[2, 2], 0
] = [0, -0.0128571, 0.00428571; -0.0225, 0, 0.0375; -0.00666667, 0.0133333, 0]
x10 := b[0]/M[0, 0] + (-M[0, 1]/M[0, 0]*e1) + (-M[0, 2]/M[0, 0]*e2) = 0.928571
x0 := b[0]/M[0, 0] + (-M[0, 1]/M[0, 0]*a1) + (-M[0, 2]/M[0, 0]*a2) = 0.912321
i := 2
y10 := b[1]/M[1, 1] + (-M[1, 0]/M[1, 1]*e) + (-M[1, 2]/M[1, 1]*e2) = 2.125
y0 := b[1]/M[1, 1] + (-M[1, 0]/M[1, 1]*x0) + (-M[1, 2]/M[1, 1]*a2) = 2.20135
b[i]/M[i, i] = 2.58333
z0 := b[2]/M[2, 2] + (-M[2, 0]/M[2, 2]*x0) + (-M[2, 1]/M[2, 2]*y0) = 2.6066
z10 := b[2]/M[2, 2] + (-M[2, 0]/M[2, 2]*e) + (-M[2, 1]/M[2, 2]*e1) = 2.58333
x1 := b[0]/M[0, 0] + (-M[0, 1]/M[0, 0]*y0) + (-M[0, 2]/M[0, 0]*z0) = 0.91144
x11 := b[0]/M[0, 0] + (-M[0, 1]/M[0, 0]*y10) + (-M[0, 2]/M[0, 0]*z10) = 0.912321
y1 := b[1]/M[1, 1] + (-M[1, 0]/M[1, 1]*x1) + (-M[1, 2]/M[1, 1]*z0) = 2.20224
y11 := b[1]/M[1, 1] + (-M[1, 0]/M[1, 1]*x10) + (-M[1, 2]/M[1, 1]*z10) = 2.20098
z1 := b[2]/M[2, 2] + (-M[2, 0]/M[2, 2]*x1) + (-M[2, 1]/M[2, 2]*y1) = 2.60662
z11 := b[2]/M[2, 2] + (-M[2, 0]/M[2, 2]*x10) + (-M[2, 1]/M[2, 2]*y10) = 2.60548
x12 := b[0]/M[0, 0] + (-M[0, 1]/M[0, 0]*y11) + (-M[0, 2]/M[0, 0]*z11) = 0.911439
x2 := b[0]/M[0, 0] + (-M[0, 1]/M[0, 0]*y1) + (-M[0, 2]/M[0, 0]*z1) = 0.911428
y12 := b[1]/M[1, 1] + (-M[1, 0]/M[1, 1]*x11) + (-M[1, 2]/M[1, 1]*z11) = 2.20218
y2 := b[1]/M[1, 1] + (-M[1, 0]/M[1, 1]*x2) + (-M[1, 2]/M[1, 1]*z1) = 2.20224
z12 := b[2]/M[2, 2] + (-M[2, 0]/M[2, 2]*x11) + (-M[2, 1]/M[2, 2]*y11) = 2.6066
z2 := b[2]/M[2, 2] + (-M[2, 0]/M[2, 2]*x2) + (-M[2, 1]/M[2, 2]*y2) = 2.60662
x13 := b[0]/M[0, 0] + (-M[0, 1]/M[0, 0]*y12) + (-M[0, 2]/M[0, 0]*z12) = 0.911429
y13 := b[1]/M[1, 1] + (-M[1, 0]/M[1, 1]*x12) + (-M[1, 2]/M[1, 1]*z12) = 2.20224
z13 := b[2]/M[2, 2] + (-M[2, 0]/M[2, 2]*x12) + (-M[2, 1]/M[2, 2]*y12) = 2.60662
x14 := b[0]/M[0, 0] + (-M[0, 1]/M[0, 0]*y13) + (-M[0, 2]/M[0, 0]*z13) = 0.911428
y14 := b[1]/M[1, 1] + (-M[1, 0]/M[1, 1]*x13) + (-M[1, 2]/M[1, 1]*z13) = 2.20224
z14 := b[2]/M[2, 2] + (-M[2, 0]/M[2, 2]*x13) + (-M[2, 1]/M[2, 2]*y13) = 2.60662
a := 0.25
b := 1.4
A := [
    5.18 + a, 1.12, 0.95, 1.32, 0.83;
    1.12, 4.28 - a, 2.12, 0.57, 0.91;
    0.95, 2.12, 6.13 + a, 1.29, 1.57;
    1.32, 0.57, 1.29, 4.57 - a, 1.25;
    0.83, 0.91, 1.57, 1.25, 5.21 + a
] = [
    5.43, 1.12, 0.95, 1.32, 0.83;
    1.12, 4.03, 2.12, 0.57, 0.91;
    0.95, 2.12, 6.38, 1.29, 1.57;
    1.32, 0.57, 1.29, 4.32, 1.25;
    0.83, 0.91, 1.57, 1.25, 5.46
]
B := [6.19; 3.21; 4.28 - b; 6.25; 4.95 + b] = [6.19; 3.21; 2.88; 6.25; 6.35]
U[0, 0] := sqrt(A[0, 0])
U[0, 1] := A[0, 1]/U[0, 0]
U[0, 2] := A[0, 2]/U[0, 0]
U[0, 3] := A[0, 3]/U[0, 0]
U[0, 4] := A[0, 4]/U[0, 0]
U[1, 1] := sqrt(A[1, 1] - U[0, 1]^2)
U[1, 2] := (A[1, 2] - U[0, 1]*U[0, 2])/U[1, 1]
U[1, 3] := (A[1, 3] - U[0, 1]*U[0, 3])/U[1, 1]
U[1, 4] := (A[1, 4] - U[0, 1]*U[0, 4])/U[1, 1]
U[2, 2] := sqrt(A[2, 2] - U[0, 2]^2 - U[1, 2]^2)
U[2, 3] := (A[2, 3] - U[0, 2]*U[0, 3] - U[1, 2]*U[1, 3])/U[2, 2]
U[2, 4] := (A[2, 4] - U[0, 2]*U[0, 4] - U[1, 2]*U[1, 4])/U[2, 2]
U[3, 3] := sqrt(A[3, 3] - U[0, 3]^2 - U[1, 3]^2 - U[2, 3]^2)
U[3, 4] := (A[3, 4] - U[0, 3]*U[0, 4] - U[1, 3]*U[1, 4] - U[2, 3]*U[2, 4])/U[3, 3]
U[4, 4] := sqrt(A[4, 4] - U[0, 4]^2 - U[1, 4]^2 - U[2, 4]^2 - U[3, 4]^2)
U = [
    2.33024, 0.480638, 0.407684, 0.566466, 0.356187;
    0, 1.9491, 0.987149, 0.152755, 0.379048;
    0, 0, 2.28896, 0.396804, 0.458991;
    0, 0, 0, 1.95405, 0.413602;
    0, 0, 0, 0, 2.19265
]
Ut := transpose(U)
y := lsolve(Ut, B) = [2.65638; 0.991864; 0.357332; 2.27831; 1.78849]
Ut = [
    2.33024, 0, 0, 0, 0;
    0.480638, 1.9491, 0, 0, 0;
    0.407684, 0.987149, 2.28896, 0, 0;
    0.566466, 0.152755, 0.396804, 1.95405, 0;
    0.356187, 0.379048, 0.458991, 0.413602, 2.19265
]
x := lsolve(U, y) = [0.730296; 0.363393; -0.179645; 0.993292; 0.815677]
lsolve(A, B) = [0.730296; 0.363393; -0.179645; 0.993292; 0.815677]
