x[0] := -4
x[1] := -3
x[2] := -2
x[3] := -1
x[4] := 0
x[5] := 1
x[6] := 2
x[7] := 3
x[8] := 4
y[0] := 6
y[1] := 3
y[2] := 1
y[3] := 0.3
y[4] := -0.1
y[5] := -0.2
y[6] := 0
y[7] := 0.2
y[8] := 1
n := 9
A1 := x[0] + x[1] + x[2] + x[3] + x[4] + x[5] + x[6] + x[7] = -4
B1 := y[0] + y[1] + y[2] + y[3] + y[4] + y[5] + y[6] + y[7] = 10.2
C1 := x[0]^2 + x[1]^2 + x[2]^2 + x[3]^2 + x[4]^2 + x[5]^2 + x[6]^2 + x[7]^2 = 44
D1 := x[0]*y[0] + x[1]*y[1] + x[2]*y[2] + x[3]*y[3] + x[4]*y[4] + x[5]*y[5] + x[6]*y[6] + x[7]*y[7] = -34.9
E1 := x[0]^3 + x[1]^3 + x[2]^3 + x[3]^3 + x[4]^3 + x[5]^3 + x[6]^3 + x[6]^3 = -83
F1 := x[0]^4 + x[1]^4 + x[2]^4 + x[3]^4 + x[4]^4 + x[5]^4 + x[6]^4 + x[6]^4 = 387
G1 := x[0]^2*y[0] + x[1]^2*y[1] + x[2]^2*y[2] + x[3]^2*y[3] + x[4]^2*y[4] + x[5]^2*y[5] + x[6]^2*y[6] + x[7]^2*y[7] = 128.9
a0 := det([n, A1, C1; A1, C1, E1; C1, E1, F1]) = 29091
c1 := det([n, A1, B1; A1, C1, D1; C1, E1, G1])/a0 = 0.436331
a := det([B1, A1, C1; D1, C1, E1; G1, E1, F1])/a0 = -1.02809
b := det([n, B1, C1; A1, D1, E1; C1, G1, F1])/a0 = -0.0635661
a1 := det([n, A1; A1, C1]) = 380
b1 := det([B1, A1; D1, C1])/a1 = 0.813684
c2 := det([n, B1; A1, D1])/a1 = -0.719211
f1(x) := c2*x + b1
f(x) := c1*x^2 + b*x + a
d[0] := y[0] - f1(x[0]) = 2.30947
d1[0] := y[0] - f(x[0]) = -0.207466
d[1] := y[1] - f1(x[1]) = 0.0286842
d1[1] := y[1] - f(x[1]) = -0.0895844
d[2] := y[2] - f1(x[2]) = -1.25211
d1[2] := y[2] - f(x[2]) = 0.155636
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d[3] := y[3] - f1(x[3]) = -1.23289
d1[3] := y[3] - f(x[3]) = 0.828194
d[4] := y[4] - f1(x[4]) = -0.913684
d1[4] := y[4] - f(x[4]) = 0.928091
d[5] := y[5] - f1(x[5]) = -0.294474
d1[5] := y[5] - f(x[5]) = 0.455326
d[6] := y[6] - f1(x[6]) = 0.624737
d1[6] := y[6] - f(x[6]) = -0.5901
d[7] := y[7] - f1(x[7]) = 1.54395
d1[7] := y[7] - f(x[7]) = -2.50819
d[8] := y[8] - f1(x[8]) = 3.06316
d1[8] := y[8] - f(x[8]) = -4.69894
d^2 = [5.33367; 0.000822784; 1.56777; 1.52003; 0.834819; 0.0867148; 0.390296; 2.38377; 9.38294]
d1^2 = [0.0430422; 0.00802537; 0.0242225; 0.685906; 0.861353; 0.207322; 0.348218; 6.29101; 22.08]
S1 := d[0]^2 + d[1]^2 + d[2]^2 + d[3]^2 + d[4]^2 + d[5]^2 + d[6]^2 + d[7]^2 = 12.1179
S2 := d1[0]^2 + d1[1]^2 + d1[2]^2 + d1[3]^2 + d1[4]^2 + d1[5]^2 + d1[6]^2 + d1[7]^2 = 8.4691
