x0 := 0.3
y0 := 0.0447
X := 0.7
x1 := 0.5
y1 := 0.1224
q := 0
x2 := 0.7
y2 := 0.2352
ss := q*(q - 1)*(q - 2)*(q - 3)*(q - 4) = 0
x3 := 0.9
y3 := 0.3784
x4 := 1.1
y4 := 0.5464
L4 := y0*ss/(4!*q) - y1*ss/(3!*(q - 1)) + y2*ss/(2!*2!*(q - 2)) - y3*ss/(3!*(q - 3)) + y4*ss/(4!*(q - 4)) = 0
h := 0.2
L4f0 := 1/h*(y0/4!*(4*q^3 - 30*q^2 + 70*q - 50) - y1/3!*(4*q^3 - 27*q^2 + 52*q - 24) + y2/(2!*2!)*(4*q^3 - 24*q^2 + 38*q - 12) - y3/3!*(4*q^3 - 21*q^2 + 28*q - 8) + y4/4!*(4*q^3 - 18*q^2 + 22*q - 6)) = 0.294042
n := 4
q := 1
L4f1 := 1/h*(y0/4!*(4*q^3 - 30*q^2 + 70*q - 50) - y1/3!*(4*q^3 - 27*q^2 + 52*q - 24) + y2/(2!*2!)*(4*q^3 - 24*q^2 + 38*q - 12) - y3/3!*(4*q^3 - 21*q^2 + 28*q - 8) + y4/4!*(4*q^3 - 18*q^2 + 22*q - 6)) = 0.479792
q := 2
L4f2 := 1/h*(y0/4!*(4*q^3 - 30*q^2 + 70*q - 50) - y1/3!*(4*q^3 - 27*q^2 + 52*q - 24) + y2/(2!*2!)*(4*q^3 - 24*q^2 + 38*q - 12) - y3/3!*(4*q^3 - 21*q^2 + 28*q - 8) + y4/4!*(4*q^3 - 18*q^2 + 22*q - 6)) = 0.644292
q := 3
L4f3 := 1/h*(y0/4!*(4*q^3 - 30*q^2 + 70*q - 50) - y1/3!*(4*q^3 - 27*q^2 + 52*q - 24) + y2/(2!*2!)*(4*q^3 - 24*q^2 + 38*q - 12) - y3/3!*(4*q^3 - 21*q^2 + 28*q - 8) + y4/4!*(4*q^3 - 18*q^2 + 22*q - 6)) = 0.783042
q := 4
L4f4 := 1/h*(y0/4!*(4*q^3 - 30*q^2 + 70*q - 50) - y1/3!*(4*q^3 - 27*q^2 + 52*q - 24) + y2/(2!*2!)*(4*q^3 - 24*q^2 + 38*q - 12) - y3/3!*(4*q^3 - 21*q^2 + 28*q - 8) + y4/4!*(4*q^3 - 18*q^2 + 22*q - 6)) = 0.891542
q1 := 0
ss1 := q1*(q1 - 1)*(q1 - 2) = 0
L2 := y0*ss1/(2!*q1) - y2*ss1/(1!*1!*(q1 - 1)) + y4*ss1/(2!*(q1 - 2)) = 0
L2f0 := 1/h*(y0/2!*(2*q1 - 3) - y1/1!*(2*q1 - 2) + y2/2!*(2*q1 - 1)) = 0.30075
q1 := 1
L2f1 := 1/h*(y0/2!*(2*q1 - 3) - y1/1!*(2*q1 - 2) + y2/2!*(2*q1 - 1)) = 0.47625
q1 := 2
L2f2 := 1/h*(y0/2!*(2*q1 - 3) - y1/1!*(2*q1 - 2) + y2/2!*(2*q1 - 1)) = 0.65175
q1 := 0
L2f3 := 1/h*(y2/2!*(2*q1 - 3) - y3/1!*(2*q1 - 2) + y4/2!*(2*q1 - 1)) = 0.654
q1 := 1
L2f4 := 1/h*(y2/2!*(2*q1 - 3) - y3/1!*(2*q1 - 2) + y4/2!*(2*q1 - 1)) = 0.778
q1 := 2
# Расчет дла n=4
L2f5 := 1/h*(y2/2!*(2*q1 - 3) - y3/1!*(2*q1 - 2) + y4/2!*(2*q1 - 1)) = 0.902
L4f0 = 0.294042
L4f1 = 0.479792
L4f2 = 0.644292
L4f3 = 0.783042
L4f4 = 0.891542
# Расчет дла n=2
L2f0 = 0.30075
L2f1 = 0.47625
L2f2 = 0.65175
L2f3 = 0.654
L2f4 = 0.778
L2f5 = 0.902
# Точное значение заданой функции
1 - cos(X) = 0.235158
# Значение производной
r := d/dX(1 - cos(X)) - L2f2 = -0.00753231
r*2 = -0.0150646
d/dX(1 - cos(X)) = 0.644218
r1 := d/dX(1 - cos(X)) - L4f2 = -7.39794e-5
r1*2 = -0.000147959
