x[0] := 0
x[1] := 7
x[2] := 12
x[3] := 17
x[4] := 22
x[5] := 27
x[6] := 32
x[7] := 37
n := 8
y[0] := 100
y[1] := 87.2
y[2] := 72.9
y[3] := 63.2
y[4] := 54.7
y[5] := 47.5
y[6] := 41.4
y[7] := 36.3
j := 7
A1 := x[0] + x[1] + x[2] + x[3] + x[4] + x[5] + x[6] + x[7] = 154
B1 := y[0] + y[1] + y[2] + y[3] + y[4] + y[5] + y[6] + y[7] = 503.2
x[j]^3 = 50653
C1 := x[0]^2 + x[1]^2 + x[2]^2 + x[3]^2 + x[4]^2 + x[5]^2 + x[6]^2 + x[7]^2 = 4088
D1 := x[0]*y[0] + x[1]*y[1] + x[2]*y[2] + x[3]*y[3] + x[4]*y[4] + x[5]*y[5] + x[6]*y[6] + x[7]*y[7] = 7713.4
x[j]^4 = 1874161
E1 := x[0]^3 + x[1]^3 + x[2]^3 + x[3]^3 + x[4]^3 + x[5]^3 + x[6]^3 + x[7]^3 = 120736
x[j]^2*y[j] = 49694.7
F1 := x[0]^4 + x[1]^4 + x[2]^4 + x[3]^4 + x[4]^4 + x[5]^4 + x[6]^4 + x[7]^4 = 3795092
G1 := x[0]^2*y[0] + x[1]^2*y[1] + x[2]^2*y[2] + x[3]^2*y[3] + x[4]^2*y[4] + x[5]^2*y[5] + x[6]^2*y[6] + x[7]^2*y[7] = 186226
a0 := det([n, A1, C1; A1, C1, E1; C1, E1, F1])
a := det([B1, A1, C1; D1, C1, E1; G1, E1, F1])/a0
b := det([n, B1, C1; A1, D1, E1; C1, G1, F1])/a0
c1 := det([n, A1, B1; A1, C1, D1; C1, E1, G1])/a0
a = 101.323
b = -2.58104
a1 := det([n, A1; A1, C1]) = 8988
c1 = 0.0220399
b1 := det([B1, A1; D1, C1])/a1 = 96.7087
c2 := det([n, B1; A1, D1])/a1 = -1.7563
f1(x) := c2*x + b1
f(x) := c1*x^2 + b*x + a
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d[0] := y[0] - f1(x[0]) = 3.29128
d1[0] := y[0] - f(x[0]) = -1.32268
d[1] := y[1] - f1(x[1]) = 2.78536
d1[1] := y[1] - f(x[1]) = 2.86466
d[2] := y[2] - f1(x[2]) = -2.73316
d1[2] := y[2] - f(x[2]) = -0.62392
d[3] := y[3] - f1(x[3]) = -3.65167
d1[3] := y[3] - f(x[3]) = -0.614494
d[4] := y[4] - f1(x[4]) = -3.37018
d1[4] := y[4] - f(x[4]) = -0.50706
d[5] := y[5] - f1(x[5]) = -1.7887
d1[5] := y[5] - f(x[5]) = -0.20162
d[6] := y[6] - f1(x[6]) = 0.89279
d1[6] := y[6] - f(x[6]) = 0.101827
d[7] := y[7] - f1(x[7]) = 4.57428
d1[7] := y[7] - f(x[7]) = 0.303281
d^2 = [10.8325; 7.75822; 7.47014; 13.3347; 11.3581; 3.19943; 0.797075; 20.924]
d1^2 = [1.74947; 8.20628; 0.389276; 0.377602; 0.25711; 0.0406506; 0.0103688; 0.0919795]
S1 := d[0]^2 + d[1]^2 + d[2]^2 + d[3]^2 + d[4]^2 + d[5]^2 + d[6]^2 + d[7]^2 = 75.6742
S2 := d1[0]^2 + d1[1]^2 + d1[2]^2 + d1[3]^2 + d1[4]^2 + d1[5]^2 + d1[6]^2 + d1[7]^2 = 11.1227
