x0 := 0.3
x1 := 0.5
x2 := 0.7
x3 := 0.9
x4 := 1.1
x5 := 1.3
eps := 1.1
y0 := 0.0447
y1 := 0.1224
y2 := 0.2352
y3 := 0.3784
y4 := 0.5464
y5 := 0.7325
n := 6
M := [0, 4, 1, 0, 0, 0, 0; 0, 1, 4, 1, 0, 0, 0; 0, 0, 1, 4, 1, 0, 0; 0, 0, 0, 1, 4, 1, 0]
# Сплайн
deltay[0] := y1 - y0 = 0.0777
h := x1 - x0 = 0.2
deltay[1] := y2 - y1 = 0.1128
delta2y[0] := deltay[1] - deltay[0] = 0.0351
deltay[2] := y3 - y2 = 0.1432
delta2y[1] := deltay[2] - deltay[1] = 0.0304
deltay[3] := y4 - y3 = 0.168
delta2y[2] := deltay[3] - deltay[2] = 0.0248
deltay[4] := y5 - y4 = 0.1861
delta2y[3] := deltay[4] - deltay[3] = 0.0181
B := [3*delta2y[0]/h^2; 3*delta2y[1]/h^2; 3*delta2y[2]/h^2; 3*delta2y[3]/h^2] = [2.6325; 2.28; 1.86; 1.3575]
C := lsolve(M, B)
b[1] := deltay[0]/h - 1/3*h*(C[1] + 2*C[0]) = 0.35043
a[1] := y0
d[1] := (C[1] - C[0])/3h = 0.190351
d[2] := (C[2] - C[1])/3h = -0.0742571
b[2] := deltay[1]/h - 1/3*h*(C[2] + 2*C[1]) = 0.464641
a[2] := y1
d[3] := (C[3] - C[2])/3h = -0.010823
b[3] := deltay[2]/h - 1/3*h*(C[3] + 2*C[2]) = 0.648508
a[3] := y2
d[4] := (C[4] - C[3])/3h
b[4] := deltay[3]/h - 1/3*h*(C[4] + 2*C[3]) = 0.781327
a[4] := y3
d[5] := (C[6] - C[5])/3h = -0.0159469
b[5] := deltay[4]/h - 1/3*h*(C[5] + 2*C[4]) = 0.894182
a[5] := y4
d = [0; 0.190351; -0.0742571; -0.010823; -0.0224509; -0.0159469]
b = [0; 0.35043; 0.464641; 0.648508; 0.781327; 0.894182]
a = [0; 0.0447; 0.1224; 0.2352; 0.3784; 0.5464]
f1(x) := d[1]*(x - x0)^3 + C[0]*(x - x0)^2 + b[1]*(x - x0) + a[1]
f2(x) := d[2]*(x - x1)^3 + C[1]*(x - x1)^2 + b[2]*(x - x1) + a[2]
f3(x) := d[3]*(x - x2)^3 + C[2]*(x - x2)^2 + b[3]*(x - x2) + a[3]
f4(x) := d[4]*(x - x3)^3 + C[3]*(x - x3)^2 + b[4]*(x - x3) + a[4]
f5(x) := d[5]*(x - x4)^3 + C[4]*(x - x4)^2 + b[5]*(x - x4) + a[5]
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f5(eps) = 0.5464
# Эйлер
f6(x) := d^7/dx^7(1 - cos(x)) → -sin(x)
L1(x) := y0*(x - x1)*(x - x2)*(x - x3)*(x - x4)*(x - x5)/((x0 - x1)*(x0 - x2)*(x0 - x3)*(x0 - x4)*(x0 - x5))
L2(x) := y1*(x - x0)*(x - x2)*(x - x3)*(x - x4)*(x - x5)/((x1 - x0)*(x1 - x2)*(x1 - x3)*(x1 - x4)*(x1 - x5))
L3(x) := y2*(x - x0)*(x - x1)*(x - x3)*(x - x4)*(x - x5)/((x2 - x0)*(x2 - x1)*(x2 - x3)*(x2 - x4)*(x2 - x5))
L4(x) := y3*(x - x0)*(x - x1)*(x - x2)*(x - x4)*(x - x5)/((x3 - x0)*(x3 - x1)*(x3 - x2)*(x3 - x4)*(x3 - x5))
L5(x) := y4*(x - x0)*(x - x1)*(x - x2)*(x - x3)*(x - x5)/((x4 - x0)*(x4 - x1)*(x4 - x2)*(x4 - x3)*(x4 - x5))
L6(x) := y5*(x - x0)*(x - x1)*(x - x2)*(x - x3)*(x - x4)/((x5 - x0)*(x5 - x1)*(x5 - x2)*(x5 - x3)*(x5 - x4))
L(x) := L1(x) + L2(x) + L3(x) + L4(x) + L5(x) + L6(x)
RR(x) := f6(eps)*(x - x0)*(x - x1)*(x - x2)*(x - x3)*(x - x4)*(x - x5)/(n + 1)! → (x - 1.1)*(x - 1.3)*(x - 0.7)*(x - 0.9)*(-0.891207360061*x + 0.267362208018)*(x - 0.5)/5040
RRR(x) := f6(x5)*|(x - x0)*(x - x1)*(x - x2)*(x - x3)*(x - x4)*(x - x5)|/(n + 1)! → -0.000191182179646*|(x - 0.3)*(x - 1.3)*(x - 0.7)*(x - 0.9)*(x - 0.5)*(x - 1.1)|
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L(eps) = 0.5464
RR(eps) = 0
RRR(eps) = 0
# Кусочно - квадратичная | Кусочно - линейлая
LC1(x) := y1*(x - x0)*(x - x2)/((x1 - x0)*(x1 - x2))
LL1(x) := y0*(x - x1)/(x0 - x1)
LC2(x) := y2*(x - x1)*(x - x3)/((x2 - x1)*(x2 - x3))
LL2(x) := y1*(x - x2)/(x1 - x2)
LC3(x) := y3*(x - x2)*(x - x4)/((x3 - x2)*(x3 - x4))
LL3(x) := y2*(x - x3)/(x2 - x3)
LC4(x) := y4*(x - x3)*(x - x5)/((x4 - x3)*(x4 - x5))
LL4(x) := y3*(x - x4)/(x3 - x4)
LC4(eps) = 0.5464
LL5(x) := y4*(x - x5)/(x4 - x5)
LL5(eps) = 0.5464
RR(x) → (x - 1.1)*(x - 1.3)*(x - 0.7)*(x - 0.9)*(-0.891207360061*x + 0.267362208018)*(x - 0.5)/5040
RRR(x) → -0.000191182179646*|(x - 0.3)*(x - 1.3)*(x - 0.7)*(x - 0.9)*(x - 0.5)*(x - 1.1)|
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