f1(x) := 2^x + 2
f2(x) := 1 + x^5
f3(x) := (1 - x)/3
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F12(x) := f1(x) - f2(x)
x121 := 1
x122 := 2
X121 := root(F12(x121), x121) = 1.27935
X122 := root(F12(x122), x122) = 1.27935
F13(x) := f1(x) - f3(x)
x131 := -5.5
x132 := -4.3
X131 := root(F13(x131), x131) = -5.08819
X132 := root(F13(x132), x132) = -5.08819
F23(x) := f2(x) - f3(x)
x231 := -2
x232 := -1
X231 := root(F23(x231), x231) = -0.828553
X232 := root(F23(x232), x232) = -0.828553
a := X131
b := X231
c := X121
S1 := integral(f1(x), x = a .. b) - integral(f3(x), x = a .. b) = 3.66883
S2 := integral(f1(x), x = b .. c) - integral(f2(x), x = b .. c) = 4.12052
ploshad := S1 + S2 = 7.78935
