x0 := 0
h := 0.05
x1 := 0.05
f(x, y) := (e^(-(y^2 + 1)) + 2*x)
# Модификцированный метода Эйлера
y0 := 0.3  # Простой метод Эйлера
# Усовершенствованный метод Эйлера-Коши
z(i) := x0 + i*h
x2 := 0.1
y1 := y0 + f(x0, y0)*h = 0.316811
y13 := y0 + f(z(0), y0)*h/2 = 0.308405
x3 := 0.15
y12 := y0 + (f(x0, y0) + f(x1, y1))*h/2 = 0.319224
x4 := 0.2
y2 := y1 + f(x1, y1)*h = 0.338448
y23 := y1 + f(z(1), y1)*h/2 = 0.32763
y22 := y1 + (f(x1, y1) + f(x2, y2))*h/2 = 0.340831
x5 := 0.25
y3 := y2 + f(x2, y2)*h = 0.364851
y33 := y2 + f(z(2), y2)*h/2 = 0.35165
y32 := y2 + (f(x2, y2) + f(x3, y3))*h/2 = 0.367201
x6 := 0.3
y4 := y3 + f(x3, y3)*h = 0.395953
y43 := y3 + f(z(3), y3)*h/2 = 0.380402
x7 := 0.35
y42 := y3 + (f(x3, y3) + f(x4, y4))*h/2 = 0.398265
x8 := 0.4
y5 := y4 + f(x4, y4)*h = 0.431678
y53 := y4 + f(z(4), y4)*h/2 = 0.413815
y52 := y4 + (f(x4, y4) + f(x5, y5))*h/2 = 0.433949
x9 := 0.45
y6 := y5 + f(x5, y5)*h = 0.471944
y63 := y5 + f(z(5), y5)*h/2 = 0.451811
y62 := y5 + (f(x5, y5) + f(x6, y6))*h/2 = 0.474172
x10 := 0.5
y7 := y6 + f(x6, y6)*h = 0.516666
y73 := y6 + f(z(6), y6)*h/2 = 0.494305
y72 := y6 + (f(x6, y6) + f(x7, y7))*h/2 = 0.518847
y8 := y7 + f(x7, y7)*h = 0.56575
y83 := y7 + f(z(7), y7)*h/2 = 0.541208
y82 := y7 + (f(x7, y7) + f(x8, y8))*h/2 = 0.567886
y9 := y8 + f(x8, y8)*h = 0.619106
y93 := y8 + f(z(8), y8)*h/2 = 0.592428
y92 := y8 + (f(x8, y8) + f(x9, y9))*h/2 = 0.621197
y10 := y9 + f(x9, y9)*h = 0.676644
y103 := y9 + f(z(9), y9)*h/2 = 0.647875
y102 := y9 + (f(x9, y9) + f(x10, y10))*h/2 = 0.678693
z(i) := x0 + i*h + h/2
# Модифицированный метода Эйлера
y14 := y0 + f(z(0), y0)*h = 0.319311
y24 := y1 + f(z(1), y13)*h = 0.341036
y34 := y2 + f(z(2), y23)*h = 0.36747
y44 := y3 + f(z(3), y33)*h = 0.398606
y54 := y4 + f(z(4), y43)*h = 0.434369
y64 := y5 + f(z(5), y53)*h = 0.474677
y74 := y6 + f(z(6), y63)*h = 0.519442
y84 := y7 + f(z(7), y73)*h = 0.568572
y94 := y8 + f(z(8), y83)*h = 0.621974
h1 := 0.1
y104 := y9 + f(z(9), y93)*h = 0.679555
x11 := 2.1
# Метод Рунге-Кутты
z(i) := x11 + i*h1
y01 := 2.5
f(x, y) := x + 1/sqrt(11)*cos(y)
k1 := h1*f(z(0), y01)
k2 := h1*f(z(0) + h1/2, y01 + k1/2)
k3 := h1*f(z(0) + h1/2, y01 + k2/2)
k4 := h1*f(z(0) + h1, y01 + k3)
y11 := y01 + 1/6*(k1 + 2*k2 + 2*k3 + k4) = 2.6893
k11 := h1*f(z(1), y11)
k21 := h1*f(z(1) + h1/2, y11 + k11/2)
k31 := h1*f(z(1) + h1/2, y11 + k21/2)
k41 := h1*f(z(1) + h1, y11 + k31)
y21 := y11 + 1/6*(k11 + 2*k21 + 2*k31 + k41) = 2.88607
k12 := h1*f(z(2), y21)
k22 := h1*f(z(2) + h1/2, y21 + k12/2)
k32 := h1*f(z(2) + h1/2, y21 + k22/2)
k42 := h1*f(z(2) + h1, y21 + k32)
y31 := y21 + 1/6*(k12 + 2*k22 + 2*k32 + k42) = 3.09132
k13 := h1*f(z(3), y31)
k23 := h1*f(z(3) + h1/2, y31 + k13/2)
k33 := h1*f(z(3) + h1/2, y31 + k23/2)
k43 := h1*f(z(3) + h1, y31 + k33)
y41 := y31 + 1/6*(k13 + 2*k23 + 2*k33 + k43) = 3.30628
k14 := h1*f(z(4), y41)
k24 := h1*f(z(4) + h1/2, y41 + k14/2)
k34 := h1*f(z(4) + h1/2, y41 + k24/2)
k44 := h1*f(z(4) + h1, y41 + k34)
y51 := y41 + 1/6*(k14 + 2*k24 + 2*k34 + k44) = 3.53233
k15 := h1*f(z(5), y51)
k25 := h1*f(z(5) + h1/2, y51 + k15/2)
k35 := h1*f(z(5) + h1/2, y51 + k25/2)
k45 := h1*f(z(5) + h1, y51 + k35)
y61 := y51 + 1/6*(k15 + 2*k25 + 2*k35 + k45) = 3.77107
k16 := h1*f(z(6), y61)
k26 := h1*f(z(6) + h1/2, y61 + k16/2)
k36 := h1*f(z(6) + h1/2, y61 + k26/2)
k46 := h1*f(z(6) + h1, y61 + k36)
y71 := y61 + 1/6*(k16 + 2*k26 + 2*k36 + k46) = 4.02416
k17 := h1*f(z(7), y71)
k27 := h1*f(z(7) + h1/2, y71 + k17/2)
k37 := h1*f(z(7) + h1/2, y71 + k27/2)
k47 := h1*f(z(7) + h1, y71 + k37)
y81 := y71 + 1/6*(k17 + 2*k27 + 2*k37 + k47) = 4.29332
k18 := h1*f(z(8), y81)
k28 := h1*f(z(8) + h1/2, y81 + k18/2)
k38 := h1*f(z(8) + h1/2, y81 + k28/2)
k48 := h1*f(z(8) + h1, y81 + k38)
y91 := y81 + 1/6*(k18 + 2*k28 + 2*k38 + k48) = 4.5801
k19 := h1*f(z(9), y91)
k29 := h1*f(z(9) + h1/2, y91 + k19/2)
k39 := h1*f(z(9) + h1/2, y91 + k29/2)
k49 := h1*f(z(9) + h1, y91 + k39)
y101 := y91 + 1/6*(k19 + 2*k29 + 2*k39 + k49) = 4.88566
# Метод Рунге-Кутты
y11 = 2.6893
y21 = 2.88607
y31 = 3.09132
y41 = 3.30628
y51 = 3.53233
y61 = 3.77107
y71 = 4.02416
y81 = 4.29332
y91 = 4.5801
y101 = 4.88566
