ee := 0.2
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f(x) := ln(x)/sqrt(x)
x0 := 5
h := 0.1
f(x0 - h) = 0.717943
f(x0) = 0.719763
f(x0 + h) = 0.72144
x1 := x0 + h
x1 = 5.1
d/dx(f(x)) → x^(-3/2) - ln(x)/(2*x^(3/2))
f(x1) = 0.72144
k := 1
e^2 = 7.38906
x2 := x1 + 2^k*h
x2 = 5.3
f(x2) = 0.724406
k := 2
x3 := x2 + 2^k*h
x3 = 5.7
f(x3) = 0.729001
k := 3
x4 := x3 + 2^k*h
x4 = 6.5
f(x4) = 0.734181
k := 4
x5 := x4 + 2^k*h
x5 = 8.1
f(x5) = 0.735006
k := 5
x6 := x5 + 2^k*h
x6 = 11.3
f(x6) = 0.721335
# Дихотомический метод
a1 := x4
d := 0.01
b1 := x6
b1 - a1 = 4.8
y := (a1 + b1)/2 - d = 8.89
z := (a1 + b1)/2 + d = 8.91
A := f(y) = 0.732801
B := f(z) = 0.732731
a2 := a1
a2 = 6.5
b2 := z
b2 = 8.91
b2 - a2 = 2.41
y := (a2 + b2)/2 - d = 7.695
z := (a2 + b2)/2 + d = 7.715
A := f(y) = 0.73561
B := f(z) = 0.73559
a3 := a2
a3 = 6.5
b3 := z
b3 = 7.715
b3 - a3 = 1.215
y := (a3 + b3)/2 - d = 7.0975
z := (a3 + b3)/2 + d = 7.1175
A := f(y) = 0.735608
B := f(z) = 0.735628
a4 := y
a4 = 7.0975
b4 := b3
b4 = 7.715
b4 - a4 = 0.6175
y := (a4 + b4)/2 - d = 7.39625
z := (a4 + b4)/2 + d = 7.41625
A := f(y) = 0.735759
B := f(z) = 0.735758
a5 := a4
a5 = 7.0975
b5 := z
b5 = 7.41625
b5 - a5 = 0.31875
y := (a5 + b5)/2 - d = 7.24688
z := (a5 + b5)/2 + d = 7.26687
A := f(y) = 0.735724
B := f(z) = 0.735733
a6 := y
a6 = 7.24688
b6 := b5
b6 = 7.41625
b6 - a6 = 0.169375
y := (a6 + b6)/2 - d = 7.32156
z := (a6 + b6)/2 + d = 7.34156
A := f(y) = 0.735751
B := f(z) = 0.735755
a7 := y
a7 = 7.32156
b7 := b6
b7 = 7.41625
b7 - a7 = 0.0946875
(b7 + a7)/2 = 7.36891
f((a7 + b7)/2 - d) = 0.735757
f((a7 + b7)/2 + d) = 0.735759
