ee := 0.15
x0 := 15
y0 := 12
f(x, y) := (x - 2*y)^2 + (y - 9)^2
f(x0, y0) = 90
a01 := 1/d/dx0(f(x0, y0)) = -0.0555556
d/dx0(f(x0, y0)) = -18
a02 := -1/d/dy0(f(x0, y0)) = -0.0238095
d/dy0(f(x0, y0)) = 42
x1 := x0 + a01*(d/dx0(f(x0, y0)))
x1 = 16
y1 := y0 + a02*(d/dy0(f(x0, y0)))
y1 = 11
f(x1, y1) = 40
a11 := 1/d/dx1(f(x1, y1)) = -0.0833333
d/dx1(f(x1, y1)) = -12
a12 := -1/d/dy1(f(x1, y1)) = -0.0357143
d/dy1(f(x1, y1)) = 28
x2 := x1 + a11*(d/dx1(f(x1, y1)))
x2 = 17
y2 := y1 + a12*(d/dy1(f(x1, y1)))
y2 = 10
f(x2, y2) = 10
a21 := 1/d/dx2(f(x2, y2)) = -0.166667
d/dx2(f(x2, y2)) = -6
a22 := -1/d/dy2(f(x2, y2)) = -0.0714286
d/dy2(f(x2, y2)) = 14
x3 := x2 + a21*(d/dx2(f(x2, y2)))
x3 = 18
y3 := y2 + a22*(d/dy2(f(x2, y2)))
y3 = 9
f(x3, y3) = 0
d/dx3(f(x3, y3)) = 0  # На данном этапе производная равна 0. Следовательно мы нашли искомый экстремум функции
d/dy3(f(x3, y3)) = 0
x := x3 = 18
y := y3 = 9
